OpenVSP model (file version 5), 4 components.
Geometry view with OpenVSP parameter names; values to 6 digits, angles in degrees, lengths in the model's unit.
Overall bounding box: X_Min=-10 X_Len=30 Y_Min=-18.1262 Y_Len=36.2524 Z_Min=-0.54257 Z_Len=11.1306

Wing "WingGeom"
  location (X Y Z) 0 0 0, rotation 0 0 0
  symmetric about XZ
  bounding box size 7.71089 36.2524 1.34216
  totals: TotalSpan=35.7771 TotalProjectedSpan=35.7771 TotalChord=5.59017 TotalArea=200 TotalAR=6.4
  root: chord 7.71058, twist 0, airfoil file "NASA/LANGLEY/DRAGON MS(1)-0617 AIRFOIL"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 BaseThickChord=0.174177 ThickChord=0.174177
  sections:
    n  Span     Root_Chord  Tip_Chord  Area  Sweep  Sweep_Location  Dihedral  Twist  Twist_Location  tip airfoil
    1  17.8885  7.71058     3.46976    100   0      0.5             0         0      0.25            airfoil file "NASA/LANGLEY/DRAGON MS(1)-0613 AIRFOIL"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 BaseThickChord=0.140357 ThickChord=0.140357

Fuselage "FuselageGeom"
  location (X Y Z) -10 0 0.978261, rotation 180 0 0
  bounding box size 30 4.43316 5.7118
  Design: Length=30
  cross sections:
    n  XLocPercent  YLocPercent  ZLocPercent  shape
    0  0            0            0            point
    1  0.241848     0            -0.0217391   ellipse Ellipse_Height=4.13636 Ellipse_Width=3.5
    2  0.370924     0            -0.0500217   ellipse Ellipse_Height=5.59029 Ellipse_Width=3.5
    3  0.53         0            -0.0431238   ellipse Ellipse_Height=4.84545 Ellipse_Width=3.5
    4  0.75         0            -0.0590737   ellipse Ellipse_Height=3.5 Ellipse_Width=3.5
    5  1            0            -0.0642722   circle Circle_Diameter=1.76322

Wing "WingGeom", child of "FuselageGeom"
  location (X Y Z) 13.8043 0.978261 2.28261, rotation 0 0 0
  symmetric about XZ
  bounding box size 4.6188 19.277 0.69312
  totals: TotalSpan=17.3205 TotalProjectedSpan=17.3205 TotalChord=2.88675 TotalArea=50 TotalAR=6
  root: chord 4.6188, twist 0, NACA 4-series Camber=0 CamberLoc=0.2 ThickChord=0.15
  sections:
    n  Span     Root_Chord  Tip_Chord  Area  Sweep  Sweep_Location  Dihedral  Twist  Twist_Location  tip airfoil
    1  8.66025  4.6188      1.1547     25    0      0.9             0         0      0.25            NACA 4-series Camber=0 CamberLoc=0.2 ThickChord=0.1

Wing "WingGeom", child of "FuselageGeom"
  location (X Y Z) 12.5 0 4.13043, rotation 90 0 0
  bounding box size 6.24604 0.624967 6.45755
  totals: TotalSpan=6.45755 TotalProjectedSpan=6.45755 TotalChord=3.87144 TotalArea=25 TotalAR=1.668
  root: chord 6.24604, twist 0, NACA 4-series Camber=0 CamberLoc=0.2 ThickChord=0.1
  sections:
    n  Span     Root_Chord  Tip_Chord  Area  Sweep  Sweep_Location  Dihedral  Twist  Twist_Location  tip airfoil
    1  6.45755  6.24604     1.49683    25    0      0.9             0         0      0.25            as above

VSPAERO settings: Sref=200 bref=35.7771 cref=5.59017 Xcg=5.2571 Ycg=0 Zcg=0.609759 AlphaStart=-5 AlphaEnd=15 AlphaNpts=10 BetaStart=0 BetaEnd=0 BetaNpts=1 MachStart=0.1 MachEnd=0 MachNpts=1 ReCref=1e+07 Vinf=100 Rho=0.002377
